/* ---------------------------- FORCE-DEPENDENT KINEMATICS PARAMETERS ----------------------------
Forces in the IGHL ligament
Non-linear model [Bigliani, 1992]:
F = k0 + k1*eps + k2*eps^2 + k4*eps^4
*/

AnyFolder FDK ={

  //  Custom FDK parameters for all cases
//  #if CustomFDKOn == On

  //    From Lauranne's code
  AnyFloat k0 = -{-5.5, 0.5};
  AnyFloat k1 = -7.787;
  AnyFloat k2 = 4.391;
  AnyFloat k3 = 0 ;
  AnyFloat k4 = -0.08637 ;
  AnyFloat kz = 0;   //ML (Lat=+). NB: ML managed by contact between prosthetic components

  AnyFolder Contact ={AnyVar kd =1e10;};

}; // FDK
