AnyFolder InputVariables = {


  // File containing the FDK parameters for the stabilization force
  #include "FDKParameters.any"

  // Activates or not FDK (0 FDK activated)
  #ifndef BallAndSocket
  #define BallAndSocket 0
  #endif

  /* -------------------------------- MUSCLE RECRUITMENT TYPE -----------------------------------*/
   #ifndef MuscleRecruitmentType
   #define MuscleRecruitmentType MR_Polynomial
   #endif

  /*--------------------------------------FDK ALGORITHM SETTINGS---------------------------------*/
  //  Main.Study.InverseDynamics.ForceDepKin.ForceTol = 1;
  //  Main.Study.InverseDynamics.ForceDepKin.UseAdaptiveForceTolOnOff = On;

  /* ---------------------------------- MOVEMENT PARAMETERS -------------------------------------*/
  /* Type of arm movement
  Abduction : Elevation of the shoulder in the frontal plant
  Elevation : Elevation of the shoulder in the scapular plane
  */
  #ifndef ArmMovement
  #define ArmMovement Elevation
  #endif

  /*
  1 : To make an abduction with only one step (from 15deg to 15.5 deg)
  0 : abduction from 15deg to 120deg
  */
  #ifndef SmallAbductionOn
  #define SmallAbductionOn 0
  #endif

  /* -----------------------------------------CSA VARIATION CASES--------------------------------
  Case middle-short  : CSA = 20 DEG : TILT 2.229 DEG UPWARD       AND  ACROMION SHORTEN  (-12.13mm)
  CASE middle-normal : CSA = 30 DEG : TILT 2.229  DEG UPWARD      AND  ACROMION NORMAL
  CASE middle-long   : CSA = 40 DEG : TILT 2.229  DEG UPWARD      AND  ACROMION EXTENDED (+16.95mm)

  CASE up-short      : CSA = 30 DEG : TILT 11.435 DEG UPWARD      AND  ACROMION SHORTEN  (-12.13mm)
  CASE up-normal     : CSA = 40 DEG : TILT 11.435 DEG UPWARD      AND  ACROMION NORMAL
  CASE up-long       : CSA = 50 DEG : TILT 11.435 DEG UPWARD      AND  ACROMION EXTENDED (+16.95mm)


  CASE down-short   : CSA = 12 DEG : TILT -7.587 DEG DOWNWARD    AND  ACROMION SHORTEN  (-12.13mm)
  CASE down-normal   : CSA = 20 DEG : TILT -7.587 DEG DOWNWARD    AND  ACROMION NORMAL
  CASE down-long     : CSA = 30 DEG : TILT -7.587 DEG DOWNWARD    AND  ACROMION EXTENDED (+16.95mm)
  */


  /* -------------------------------------------CSA_Tilt selection------------------------------------*/
  #ifndef CSA_Tilt
  #define CSA_Tilt "middle"
  #endif
  /*
  xdown
  down
  neutral
  middle
  up
  xup

  */

  /* -------------------------------------------CSA_Acromion_Length selection------------------------------------*/

  #ifndef CSA_Acromion_Length
  #define CSA_Acromion_Length "normal"
  #endif
  /*
  xshort
  short
  normal
  long
  xlong
  */

  #define CSA_Case CSA_Tilt + "-" + CSA_Acromion_Length

  /* ------------------------- SAVE AND LOAD RESULT FILES/FOLDERS NAMES -------------------------
  Names of files to load or save in the Output folder
  m_ResultFile :   Name for results file (saved as .txt or .h5)
  m_ResultFolder : Name for folder results. !!Must be created on computer before!!
  m_LoadFolder : Name of the folder in which the .h5 file is stored
  m_LoadFile : Name for the result file to load (.h5)
  */

  // Activates the AnyOutputFile save
  #ifndef AnyOutputFileOn
  #define AnyOutputFileOn 1
  #endif

  // Result
  #ifndef m_ResultFolder
  #define m_ResultFolder "SaveData/Variation_CSA/"
  #endif

  #ifndef m_ResultFile
  #define m_ResultFile "Anybody" + CSA_Case
  #endif

  #define m_LoadFile "04-01-BallAndSocket-" + CSA_Acromion_Length + "-MR_Polynomial"
  #define m_LoadFolder "SaveData/Variation_CSA/"

}; // InputVariables
