// Hides the muscles that will be redefined (deltoideus latera; fibers)


Main.HumanModel.BodyModel.Right.ShoulderArm.Mus.deltoideus_lateral_part_1.DrwMus.Visible =Off;
Main.HumanModel.BodyModel.Right.ShoulderArm.Mus.deltoideus_lateral_part_2.DrwMus.Visible =Off;
Main.HumanModel.BodyModel.Right.ShoulderArm.Mus.deltoideus_lateral_part_3.DrwMus.Visible =Off;
Main.HumanModel.BodyModel.Right.ShoulderArm.Mus.deltoideus_lateral_part_4.DrwMus.Visible =Off;

// MuscleModel of the muscles that will be redifined. It's the exact copy of the original AMMR Code
// Values found in "Muscle-parameters-shoulder.any" and in "Muscle-parameters-shoulder-const"
Main.HumanModel.BodyModel.Right.ShoulderArm.MusPar = {

AnyMuscleModel3E My_deltoideus_lateral_part_1 = {

  AnyVar PCSA = .deltoideus_lateral_part_1.PCSA;
  F0 = .deltoideus_lateral_part_1.F0;
  Lf0 = .deltoideus_lateral_part_1.Lf0;
  Lt0 = .deltoideus_lateral_part_1.Lt0;
  Gamma0 = .deltoideus_lateral_part_1.Gamma0;
  Epsilon0 = .deltoideus_lateral_part_1.Epsilon0;
  K1 = .deltoideus_lateral_part_1.K1;
  K2 = .deltoideus_lateral_part_1.K2;
  Fcfast = .deltoideus_lateral_part_1.Fcfast;
  Jt = .deltoideus_lateral_part_1.Jt;
  Jpe = .deltoideus_lateral_part_1.Jpe;
  PEFactor = .deltoideus_lateral_part_1.PEFactor;
};

AnyMuscleModel3E My_deltoideus_lateral_part_2 = {

  AnyVar PCSA = .deltoideus_lateral_part_2.PCSA;
  F0 = .deltoideus_lateral_part_2.F0;
  Lf0 = .deltoideus_lateral_part_2.Lf0;
  Lt0 = .deltoideus_lateral_part_2.Lt0;
  Gamma0 = .deltoideus_lateral_part_2.Gamma0;
  Epsilon0 = .deltoideus_lateral_part_2.Epsilon0;
  K1 = .deltoideus_lateral_part_2.K1;
  K2 = .deltoideus_lateral_part_2.K2;
  Fcfast = .deltoideus_lateral_part_2.Fcfast;
  Jt = .deltoideus_lateral_part_2.Jt;
  Jpe = .deltoideus_lateral_part_2.Jpe;
  PEFactor = .deltoideus_lateral_part_2.PEFactor;

};

AnyMuscleModel3E My_deltoideus_lateral_part_3 = {

  AnyVar PCSA = .deltoideus_lateral_part_3.PCSA;
  F0 = .deltoideus_lateral_part_3.F0;
  Lf0 = .deltoideus_lateral_part_3.Lf0;
  Lt0 = .deltoideus_lateral_part_3.Lt0;
  Gamma0 = .deltoideus_lateral_part_3.Gamma0;
  Epsilon0 = .deltoideus_lateral_part_3.Epsilon0;
  K1 = .deltoideus_lateral_part_3.K1;
  K2 = .deltoideus_lateral_part_3.K2;
  Fcfast = .deltoideus_lateral_part_3.Fcfast;
  Jt = .deltoideus_lateral_part_3.Jt;
  Jpe = .deltoideus_lateral_part_3.Jpe;
  PEFactor = .deltoideus_lateral_part_3.PEFactor;

};

AnyMuscleModel3E My_deltoideus_lateral_part_4 = {


  AnyVar PCSA = .deltoideus_lateral_part_4.PCSA;
  F0 = .deltoideus_lateral_part_4.F0;
  Lf0 = .deltoideus_lateral_part_4.Lf0;
  Lt0 = .deltoideus_lateral_part_4.Lt0;
  Gamma0 = .deltoideus_lateral_part_4.Gamma0;
  Epsilon0 = .deltoideus_lateral_part_4.Epsilon0;
  K1 = .deltoideus_lateral_part_4.K1;
  K2 = .deltoideus_lateral_part_4.K2;
  Fcfast = .deltoideus_lateral_part_4.Fcfast;
  Jt = .deltoideus_lateral_part_4.Jt;
  Jpe = .deltoideus_lateral_part_4.Jpe;
  PEFactor = .deltoideus_lateral_part_4.PEFactor;


};


AnyMuscleModel3E My_deltoideus_posterior_part_1 = {
  AnyVar PCSA = .deltoideus_posterior_part_1.PCSA;
  F0 = .deltoideus_posterior_part_1.F0;
  Lf0 = .deltoideus_posterior_part_1.Lf0;
  Lt0 = .deltoideus_posterior_part_1.Lt0;
  Gamma0 = .deltoideus_posterior_part_1.Gamma0;
  Epsilon0 = .deltoideus_posterior_part_1.Epsilon0;
  K1 = .deltoideus_posterior_part_1.K1;
  K2 = .deltoideus_posterior_part_1.K2;
  Fcfast = .deltoideus_posterior_part_1.Fcfast;
  Jt = .deltoideus_posterior_part_1.Jt;
  Jpe = .deltoideus_posterior_part_1.Jpe;
  PEFactor = .deltoideus_posterior_part_1.PEFactor;
};

AnyMuscleModel3E My_deltoideus_posterior_part_2 = {
  AnyVar PCSA = .deltoideus_posterior_part_2.PCSA;
  F0 = .deltoideus_posterior_part_2.F0;
  Lf0 = .deltoideus_posterior_part_2.Lf0;
  Lt0 = .deltoideus_posterior_part_2.Lt0;
  Gamma0 = .deltoideus_posterior_part_2.Gamma0;
  Epsilon0 = .deltoideus_posterior_part_2.Epsilon0;
  K1 = .deltoideus_posterior_part_2.K1;
  K2 = .deltoideus_posterior_part_2.K2;
  Fcfast = .deltoideus_posterior_part_2.Fcfast;
  Jt = .deltoideus_posterior_part_2.Jt;
  Jpe = .deltoideus_posterior_part_2.Jpe;
  PEFactor = .deltoideus_posterior_part_2.PEFactor;
};

AnyMuscleModel3E My_deltoideus_posterior_part_3 = {
  AnyVar PCSA = .deltoideus_posterior_part_3.PCSA;
  F0 = .deltoideus_posterior_part_3.F0;
  Lf0 = .deltoideus_posterior_part_3.Lf0;
  Lt0 = .deltoideus_posterior_part_3.Lt0;
  Gamma0 = .deltoideus_posterior_part_3.Gamma0;
  Epsilon0 = .deltoideus_posterior_part_3.Epsilon0;
  K1 = .deltoideus_posterior_part_3.K1;
  K2 = .deltoideus_posterior_part_3.K2;
  Fcfast = .deltoideus_posterior_part_3.Fcfast;
  Jt = .deltoideus_posterior_part_3.Jt;
  Jpe = .deltoideus_posterior_part_3.Jpe;
  PEFactor = .deltoideus_posterior_part_3.PEFactor;
};

AnyMuscleModel3E My_deltoideus_posterior_part_4 = {
  AnyVar PCSA = .deltoideus_posterior_part_4.PCSA;
  F0 = .deltoideus_posterior_part_4.F0;
  Lf0 = .deltoideus_posterior_part_4.Lf0;
  Lt0 = .deltoideus_posterior_part_4.Lt0;
  Gamma0 = .deltoideus_posterior_part_4.Gamma0;
  Epsilon0 = .deltoideus_posterior_part_4.Epsilon0;
  K1 = .deltoideus_posterior_part_4.K1;
  K2 = .deltoideus_posterior_part_4.K2;
  Fcfast = .deltoideus_posterior_part_4.Fcfast;
  Jt = .deltoideus_posterior_part_4.Jt;
  Jpe = .deltoideus_posterior_part_4.Jpe;
  PEFactor = .deltoideus_posterior_part_4.PEFactor;
};

};//MusPar
